## Input file for ABAQUS

*Heading
** Job name: timoshenko_small Model name: Model-1
** Generated by: Abaqus/CAE 6.14-1
*Preprint, echo=NO, model=NO, history=NO, contact=NO
**
** PARTS
**
*Part, name=Part-1
*Node
      1,           0.,           0.,           0.
      2, 0.0399999991,           0.,           0.
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*Element, type=B31
  1,   1,   2
  2,   2,   3
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*Nset, nset=beam, generate
   1,  101,    1
*Elset, elset=beam, generate
   1,  100,    1
** Section: Section-1  Profile: Profile-1
*Beam General Section, elset=beam, lumped=NO, density=1., section=GENERAL
1., 1., 0., 1., 2.
0.,0.,-1.
20000.,10000.
*End Part
**
**
** ASSEMBLY
**
*Assembly, name=Assembly
**
*Instance, name=Part-1-1, part=Part-1
*End Instance
**
*Nset, nset=fix, instance=Part-1-1
 1,
*Nset, nset=free, instance=Part-1-1
 101,
*End Assembly
*Amplitude, name=Amp-1, definition=SMOOTH STEP
             0.,              0.,           0.005,              1.,            0.01,              0.,             10.,              0.
**
** BOUNDARY CONDITIONS
**
** Name: BC-1 Type: Symmetry/Antisymmetry/Encastre
*Boundary
fix, ENCASTRE
** ----------------------------------------------------------------
**
** STEP: Step-1
**
*Step, name=Step-1, nlgeom=NO, inc=1000
*Dynamic,alpha=0.,direct
0.005,0.5,
**
** LOADS
**
** Name: Load-1   Type: Concentrated force
*Cload, amplitude=Amp-1
free, 2, 1.
**
** OUTPUT REQUESTS
**
*Restart, write, frequency=0
**
** FIELD OUTPUT: F-Output-1
**
*Output, field, time interval=0.005
*Node Output
A, AR, AT, U, UR, UT, V, VR
VT
**
** HISTORY OUTPUT: H-Output-1
**
*Output, history, variable=PRESELECT
*End Step
