*Heading
** Job name: CUBE Model name: Model-1
** Generated by: Abaqus/CAE Learning Edition 2024
*Preprint, echo=NO, model=NO, history=NO, contact=NO
**
*Node
      1,          -1.,          -1.
      2,           1.,          -1.
      3,           1.,           1.
      4,          -1.,           1.
      5,           0.,          -1.
      6,           1.,           0.
      7,           0.,           1.
      8,          -1.,           0.
      9,           0.,           0.
*User Element, Nodes=9, Type=U1, Properties=9, Iproperties=0, Coordinates=2, Variables=90, Unsymm
1, 2, 8
2, 1, 2, 8
3, 1, 2, 8
4, 1, 2, 8
5, 1, 2
6, 1, 2
7, 1, 2
8, 1, 2
9, 4
*Element, Type=U1, elset=CUBE
1, 1, 2, 3, 4, 5, 6, 7, 8, 9
*Uel Property, elset=CUBE
1.0E+07, 0.0, 0.3, 0.0, 0.0, 0.0, 0.0, 0.0
1.0
**
*Nset, nset=ALL
 1, 2, 3, 4, 5, 6, 7, 8
 9
*Nset, nset=XSYMM
 1, 4, 8
*Nset, nset=YSYMM
 1, 2, 5
*Elset, elset=SURF
  1
**
**
** BOUNDARY CONDITIONS
**
** Name: XSYMM
** Apply Starting Essential Boundary Conditions
*Boundary
XSYMM, 1, 1
** Apply Starting Essential Boundary Conditions
** Name: YSYMM
*Boundary
YSYMM, 2, 2
2, 1, 1, -0.020
3, 1, 1, +0.020
6, 1, 1, +0.000
**
*Initial Conditions, type=FIELD, variable=1
ALL, 70.0
*Initial Conditions, type=FIELD, variable=2
ALL, 0.0
** ----------------------------------------------------------------
**
** STEP: Step-1
**
*Step, name=Step-1, nlgeom=NO, unsymm=YES
*Static
0.5, 1., 1e-05, 0.5
**
** Apply Essential Boundary Conditions
*Boundary
2, 1, 1, -0.020
3, 1, 1, +0.020
6, 1, 1, +0.000
**
** Apply Natural Boundary Conditions
*Dload
SURF, U2, -10.0
SURF, U3, -20.0
**
** OUTPUT REQUESTS
**
*Restart, write, frequency=0
**
** FIELD OUTPUT: F-Output-1
**
*Output, field, variable=PRESELECT
**
** HISTORY OUTPUT: H-Output-1
**
*Output, history, variable=PRESELECT
*End Step
** ----------------------------------------------------------------
** **Modify
** STEP: Step-2
**
*Step, name=Step-2, nlgeom=NO, unsymm=YES
*Static
0.5, 1., 1e-05, 0.5
**
** Modify Existing Essential Boundary Conditions
*Boundary
2, 1, 1, -0.010
**
** Modify Existing Natural Boundary Conditions
*Dload
SURF, U2, -30.0
SURF, U3, -10.0
**
** OUTPUT REQUESTS
**
*Restart, write, frequency=0
**
** FIELD OUTPUT: F-Output-1
**
*Output, field, variable=PRESELECT
**
** HISTORY OUTPUT: H-Output-1
**
*Output, history, variable=PRESELECT
*End Step
** ----------------------------------------------------------------
**
** STEP: Step-3
**
*Step, name=Step-3, nlgeom=NO, unsymm=YES
*Static
0.5, 1., 1e-05, 0.5
**
** Remove All Existing Essential Boundary Conditions and Add New Essential Boundary Conditions
*Boundary, OP=New
XSYMM, 1, 1, 0.0
YSYMM, 2, 2, 0.0
7, 1, 2, +0.01
**
** Remove All Existing Natural Boundary Conditions
*Dload, OP=New
**
** OUTPUT REQUESTS
**
*Restart, write, frequency=0
**
** FIELD OUTPUT: F-Output-1
**
*Output, field, variable=PRESELECT
**
** HISTORY OUTPUT: H-Output-1
**
*Output, history, variable=PRESELECT
*End Step
